<?xml version="1.0"?>
<!-- 0SFS modifications 2026-10-05: experimental single-engine STOVL accounting;
     original GPL source retained in planes/Lockheed_Martin_F-35B/tests/flightgear-jsbsim. -->

<!--
  File:     F135-PW-600.xml
  Author:   Aero-Matic v 0.81

  Inputs:
    name:           F135-PW-600
    type:           turbine
    thrust:         43000 lb
    augmented?      yes
    injected?       no
-->

<turbine_engine name="F135-PW-600">
  <!-- Retained development ratings: 28k/43k match the cited CTOL/CV classes,
       not the published 27k/41k STOVL classes. Do not change independently of
       the coupled 10k-lbf rear extraction, lift fan/roll-post forces and TSFC.
       Audit: engine-rebuild-2026-10-06/propulsion-thermal-audit.json. -->
  <milthrust> 28000.0 </milthrust>
  <maxthrust> 43000.0 </maxthrust>
  <bypassratio>     1.0 </bypassratio>
  <tsfc>
    <!-- Preserve the source generic temperature/spool correction. The fan and
         bypass force surrogates draw fuel only through this main-engine estimate. -->
    <product><value>0.886</value>
      <sqrt><quotient><property>atmosphere/T-R</property><value>389.7</value></quotient></sqrt>
      <sum><value>0.84</value><pow><difference><value>1</value>
        <quotient><difference><property>propulsion/engine[#]/n2</property><value>60</value></difference><value>40</value></quotient>
      </difference><value>2</value></pow></sum>
      <sum><value>1</value><product><value>1.328</value><property>fcs/stovl-pos-norm</property></product></sum>
    </product>
  </tsfc>
  <atsfc>           1.7 </atsfc>
  <bleed>           0.03</bleed>
  <idlen1>         30.0 </idlen1>
  <idlen2>         60.0 </idlen2>
  <maxn1>         100.0 </maxn1>
  <maxn2>         100.0 </maxn2>
  <augmented>         1 </augmented>
  <augmethod>         1 </augmethod>
  <injected>          0 </injected>

  <!-- Experimental independent core-facing and cooled nozzle solids, SI throughout. These are
       authored estimates, NOT measured F135 station temperatures or hardware
       properties. See docs/proposals/f35b-fdm.md for the heat balance, sources
       and uncertainty. This optional observer does not alter thrust or fuel.
       120 kg/s is a reference exhaust flow, corrected by inlet total pressure,
       temperature and squared core speed; 12000 J/K represents 20 kg at 600 J/kg/K.
       The baseline gas estimate is the existing native EGT schedule. The
       original wall is the cooled downstream liner/nozzle; the added core is
       upstream of afterburner heat addition. No third petal state is justified. -->
  <thermal>
    <gas-mass-flow-kg-sec><function><product>
      <value>120</value>
      <pow><quotient><property>propulsion/engine[#]/n2</property><value>100</value></quotient><value>2</value></pow>
      <quotient><property>propulsion/pt-lbs_sqft</property><value>2116.22</value></quotient>
      <sqrt><quotient><value>288.15</value><sum><property>propulsion/tat-c</property><value>273.15</value></sum></quotient></sqrt>
    </product></function></gas-mass-flow-kg-sec>
    <gas-specific-heat-j-kg-k>1150</gas-specific-heat-j-kg-k>
    <fuel-heating-value-j-kg>43300000</fuel-heating-value-j-kg>
    <afterburner-efficiency>0.95</afterburner-efficiency>
    <!-- NASA AIAA-2005-0549 Jet-A surrogate C12H23, FARst=0.068;
         limits heat release by remaining oxygen, not fuel consumption. -->
    <stoichiometric-fuel-air-ratio>0.068</stoichiometric-fuel-air-ratio>
    <wall-heat-capacity-j-k>12000</wall-heat-capacity-j-k>
    <gas-conductance-w-k><function><sum><value>20</value><product>
      <value>580</value><pow><quotient><property>propulsion/engine[#]/n2</property><value>100</value></quotient><value>2</value></pow>
    </product></sum></function></gas-conductance-w-k>
    <coolant-conductance-w-k><function><sum><value>20</value><product>
      <value>680</value><pow><quotient><property>propulsion/engine[#]/n2</property><value>100</value></quotient><value>2</value></pow>
    </product></sum></function></coolant-conductance-w-k>
    <coolant-temperature-k><function><sum>
      <property>propulsion/tat-c</property><value>273.15</value>
      <product><value>100</value><pow><quotient><property>propulsion/engine[#]/n2</property><value>100</value></quotient><value>2</value></pow></product>
    </sum></function></coolant-temperature-k>
    <radiation-area-sq-m>1</radiation-area-sq-m>
    <emissivity>0.8</emissivity>
    <!-- Effective grey flame exchange, distinct from the visible spectrum. -->
    <flame-radiation-area-sq-m>1</flame-radiation-area-sq-m>
    <flame-emissivity>0.05</flame-emissivity>
    <!-- Core-facing turbine-exit hardware: provisional reduced thermal region,
         NOT the main combustor or eight measured hot spots. 1800 J/K is 3 kg
         at 600 J/kg/K, with smaller area and weaker cooling than the liner.
         EGT bath is upstream of AB; optical spectral emissivity is separate. -->
    <solid-region name="core">
      <wall-heat-capacity-j-k>1800</wall-heat-capacity-j-k>
      <gas-temperature-k><function><sum>
        <property>propulsion/engine[#]/egt-degc</property><value>273.15</value>
      </sum></function></gas-temperature-k>
      <gas-conductance-w-k><function><sum><value>10</value><product>
        <value>590</value><pow><quotient><property>propulsion/engine[#]/n2</property><value>100</value></quotient><value>2</value></pow>
      </product></sum></function></gas-conductance-w-k>
      <coolant-conductance-w-k><function><sum><value>5</value><product>
        <value>30</value><pow><quotient><property>propulsion/engine[#]/n2</property><value>100</value></quotient><value>2</value></pow>
      </product></sum></function></coolant-conductance-w-k>
      <coolant-temperature-k><function><sum>
        <property>propulsion/tat-c</property><value>273.15</value>
        <product><value>100</value><pow><quotient><property>propulsion/engine[#]/n2</property><value>100</value></quotient><value>2</value></pow></product>
      </sum></function></coolant-temperature-k>
      <radiation-area-sq-m>0.22</radiation-area-sq-m>
      <emissivity>0.75</emissivity>
    </solid-region>
  </thermal>

  <function name="IdleThrust">
   <product>
<table>
    <independentVar lookup="row">velocities/mach</independentVar>
    <independentVar lookup="column">atmosphere/density-altitude</independentVar>
    <tableData>
         -10000     0     10000   20000   30000   40000   50000
     0.0  0.0430  0.0488  0.0528  0.0694  0.0899  0.1183  0.1467
     0.2  0.0500  0.0501  0.0335  0.0544  0.0797  0.1049  0.1342
     0.4  0.0040  0.0047  0.0020  0.0272  0.0595  0.0891  0.1203
     0.6  0.0     0.0     0.0     0.0     0.0276  0.0718  0.1073
     0.8  0.0     0.0     0.0     0.0     0.0474  0.0868  0.0900
     1.0  0.0     0.0     0.0     0.0     0.0     0.0552  0.0800
    </tableData>
   </table>
    <difference><value>1</value><product><value>0.35714285714285715</value><property>fcs/stovl-pos-norm</property></product></difference>
   </product>
  </function>

  <function name="MilThrust">
   <product>
<table>
    <independentVar lookup="row">velocities/mach</independentVar>
    <independentVar lookup="column">atmosphere/density-altitude</independentVar>
    <tableData>
          -10000       0   10000   20000   30000   40000   50000 	80000
     0.0   1.2600  1.0000  0.7400  0.5340  0.3720  0.2410  0.1490 	0
     0.2   1.1710  0.9340  0.6970  0.5060  0.3550  0.2310  0.1430 	0
     0.4   1.1500  0.9210  0.6920  0.5060  0.3570  0.2330  0.1450 	0
     0.6   1.1810  0.9510  0.7210  0.5320  0.3780  0.2480  0.1540 	0
     0.8   1.2580  1.0200  0.7820  0.5820  0.4170  0.2750  0.1700 	0
     1.0   1.3690  1.1200  0.8710  0.6510  0.4750  0.3150  0.1950 	0
     1.2   1.4850  1.2300  0.9750  0.7440  0.5450  0.3640  0.2250 	0
     1.4 	0 	0 	0 	0 	0 	0	0 	0
    </tableData>
   </table>
    <difference><value>1</value><product><value>0.35714285714285715</value><property>fcs/stovl-pos-norm</property></product></difference>
   </product>
  </function>

  <function name="AugThrust">
   <table>
    <independentVar lookup="row">velocities/mach</independentVar>
    <independentVar lookup="column">atmosphere/density-altitude</independentVar>
    <tableData>
           -10000       0   10000   20000   30000   40000   50000	80000
     0.0    1.1816  1.0000  0.8184  0.6627  0.5280  0.3756  0.2327 	0
     0.2    1.1308  0.9599  0.7890  0.6406  0.5116  0.3645  0.2258 	0
     0.4    1.1150  0.9474  0.7798  0.6340  0.5070  0.3615  0.2240 	0
     0.6    1.1284  0.9589  0.7894  0.6420  0.5134  0.3661  0.2268 	0
     0.8    1.1707  0.9942  0.8177  0.6647  0.5309  0.3784  0.2345 	0
     1.0    1.2411  1.0529  0.8648  0.7017  0.5596  0.3983  0.2467 	0
     1.2    1.3287  1.1254  0.9221  0.7462  0.5936  0.4219  0.2614 	0
     1.4    1.4365  1.2149  0.9933  0.8021  0.6360  0.4509  0.2794 	0
     1.6    1.5711  1.3260  1.0809  0.8700  0.6874  0.4860  0.3011 	0
     1.8    1.7301  1.4579  1.1857  0.9512  0.7495  0.5289  0.3277 	0
     2.0    1.8314  1.5700  1.3086  1.0474  0.8216  0.5786  0.3585 	0
     2.2    1.9700  1.6900  1.4100  1.2400  0.9100  0.6359  0.3940 	0
     2.4    2.0700  1.8000  1.5300  1.3400  1.0000  0.7200  0.4600 	0
     2.6    2.2000  1.9200  1.6400  1.4400  1.1000  0.8000  0.5200 	0
     2.8 	0 	0 	0 	0 	0 	0	0 	0
    </tableData>
   </table>
  </function>

</turbine_engine>
