<?xml version="1.0"?>
<?xml-stylesheet type="text/xsl" href="http://jsbsim.sourceforge.net/JSBSim.xsl"?>
<fdm_config name="Lockheed Martin F-35B" version="2.0" release="TRIAL"
    xmlns:xsi="http://www.w3.org/2001/XMLSchema-instance"
    xsi:noNamespaceSchemaLocation="http://jsbsim.sourceforge.net/JSBSim.xsd">

    <!-- 0SFS modifications, 2026-10-05: explicit FlightGear property defaults;
         STOVL control integration is experimental. Original source and licence
         retained in planes/Lockheed_Martin_F-35B/tests/flightgear-jsbsim. -->
    <fileheader>
        <author> F-GTUX from Erik Hofman F-16 and aeromatic </author>
        <filecreationdate> 2011-10-15 </filecreationdate>
        <version> 1.0 </version>
        <license>
         <licenseName>GPL (General Public License)</licenseName>
         <licenseURL>http://www.gnu.org/licenses/gpl.html</licenseURL>
        </license>
        <description> Models a F-35B. </description>
    </fileheader>

 <metrics>
   <wingarea  unit="FT2">  459.67 </wingarea>
   <wingspan  unit="FT" >   35.11 </wingspan>
   <wing_incidence>          2.00 </wing_incidence>
   <chord     unit="FT" >   13.09 </chord>
   <htailarea unit="FT2">   91.93 </htailarea>
   <htailarm  unit="FT" >   20.47 </htailarm>
   <vtailarea unit="FT2">   55.16 </vtailarea>
   <vtailarm  unit="FT" >   20.47 </vtailarm>
   <location name="AERORP" unit="IN">
     <x> 368.52 </x>
     <y>   0.00 </y>
     <z>   0.00 </z>
   </location>
   <location name="EYEPOINT" unit="IN">
     <x> 122.84 </x>
     <y>   0.00 </y>
     <z>  36.00 </z>
   </location>
   <location name="VRP" unit="IN">
     <x>0</x>
     <y>0</y>
     <z>20</z>
   </location>
 </metrics>

 <mass_balance>
   <ixx unit="SLUG*FT2">     24918 </ixx>
   <iyy unit="SLUG*FT2">     89003 </iyy>
   <izz unit="SLUG*FT2">     82602 </izz>
   <emptywt unit="LBS" >     32000 </emptywt>
   <location name="CG" unit="IN">
     <x> 368.52 </x>
     <y>   0.00 </y>
     <z> -15.36 </z>
   </location>
   <pointmass name="Right external tank and pylon">
     <weight unit="LBS">300</weight>
     <location unit="IN"><x>368.52</x><y>127.952756</y><z>-15.36</z></location>
   </pointmass>
   <pointmass name="Left external tank and pylon">
     <weight unit="LBS">300</weight>
     <location unit="IN"><x>368.52</x><y>-127.952756</y><z>-15.36</z></location>
   </pointmass>
 </mass_balance>

 <ground_reactions>

  <contact type="BOGEY" name="NOSE">
   <location unit="IN">
     <x>  79.85 </x>
     <y>   0.00 </y>
     <z> -73.70 </z>
   </location>
   <static_friction>  0.80 </static_friction>
   <dynamic_friction> 0.50 </dynamic_friction>
   <rolling_friction> 0.02 </rolling_friction>
   <spring_coeff unit="LBS/FT">      10000.00 </spring_coeff>
   <damping_coeff unit="LBS/FT/SEC">  2000.00 </damping_coeff>
   <max_steer unit="DEG"> 45.00 </max_steer>
   <brake_group>NONE</brake_group>
   <retractable>1</retractable>
 </contact>

  <contact type="BOGEY" name="LEFT_MAIN">
   <location unit="IN">
     <x> 383.26 </x>
     <y> -77.92 </y>
     <z> -73.70 </z>
   </location>
   <static_friction>  0.80 </static_friction>
   <dynamic_friction> 0.50 </dynamic_friction>
   <rolling_friction> 0.02 </rolling_friction>
   <spring_coeff unit="LBS/FT">      30000.00 </spring_coeff>
   <damping_coeff unit="LBS/FT/SEC"> 6000.00 </damping_coeff>
   <max_steer unit="DEG">0</max_steer>
   <brake_group>LEFT</brake_group>
   <retractable>1</retractable>
 </contact>

  <contact type="BOGEY" name="RIGHT_MAIN">
   <location unit="IN">
     <x> 383.26 </x>
     <y>  77.92 </y>
     <z> -73.70 </z>
   </location>
   <static_friction>  0.80 </static_friction>
   <dynamic_friction> 0.50 </dynamic_friction>
   <rolling_friction> 0.02 </rolling_friction>
   <spring_coeff unit="LBS/FT">      30000.00 </spring_coeff>
   <damping_coeff unit="LBS/FT/SEC"> 6000.00 </damping_coeff>
   <max_steer unit="DEG">0</max_steer>
   <brake_group>RIGHT</brake_group>
   <retractable>1</retractable>
 </contact>

  <contact type="STRUCTURE" name="LEFT_WING">
    <location unit="IN">
     <x> 368.52 </x>
     <y> -17.55 </y>
     <z> -15.36 </z>
    </location>
    <static_friction>  0.80 </static_friction>
    <dynamic_friction> 0.50 </dynamic_friction>
    <spring_coeff unit="LBS/FT">      59535.00 </spring_coeff>
    <damping_coeff unit="LBS/FT/SEC"> 11907.00 </damping_coeff>
 </contact>

  <contact type="STRUCTURE" name="RIGHT_WING">
    <location unit="IN">
     <x> 368.52 </x>
     <y>  17.55 </y>
     <z> -15.36 </z>
    </location>
    <static_friction>  0.80 </static_friction>
    <dynamic_friction> 0.50 </dynamic_friction>
    <spring_coeff unit="LBS/FT">      59535.00 </spring_coeff>
    <damping_coeff unit="LBS/FT/SEC"> 11907.00 </damping_coeff>
 </contact>

 </ground_reactions>


    <propulsion>
        <engine file="F135-PW-600">
    <location unit="IN">
      <x> 544.28127087 </x>
      <y>   0.00 </y>
      <z>   -15.36 </z>
    </location>
    <orient unit="DEG">
      <pitch> 0.00 </pitch>
      <roll>   0.00 </roll>
      <yaw>   0.00 </yaw>
    </orient>
    <feed>0</feed>
    <feed>1</feed>
    <feed>2</feed>
    <feed>3</feed>
    <thruster file="direct">
     <location unit="IN">
       <x> 544.28127087 </x>
       <y>   0.00 </y>
       <z>   -15.36 </z>
     </location>
     <orient unit="DEG">
       <pitch> 0.00 </pitch>
       <roll>   0.00 </roll>
       <yaw>   0.00 </yaw>
     </orient>
    </thruster>
        </engine>

        <!-- 13,100 lb internal fuel; two equal lumped tanks retain the source layout.
             External tank/pylon geometry, dry mass and drag remain provisional. -->
        <tank type="FUEL">    <!-- Internal tank number 0 -->
            <location unit="IN">
     <x> 368.52 </x>
     <y>  40.00 </y>
     <z> -15.36 </z>
            </location>
            <capacity unit="LBS"> 6550 </capacity>
            <contents unit="LBS"> 2500 </contents>
        </tank>
        <tank type="FUEL">    <!-- Internal tank number 1 -->
            <location unit="IN">
     <x> 368.52 </x>
     <y> -40.00 </y>
     <z> -15.36 </z>
            </location>
            <capacity unit="LBS"> 6550 </capacity>
            <contents unit="LBS"> 2500 </contents>
        </tank>
        <tank type="FUEL"> <!-- Right detachable external tank, index 2 -->
          <location unit="IN"><x>368.52</x><y>127.952756</y><z>-15.36</z></location>
          <capacity unit="LBS">2991</capacity><contents unit="LBS">0</contents>
          <priority>1</priority>
        </tank>
        <tank type="FUEL"> <!-- Left detachable external tank, index 3 -->
          <location unit="IN"><x>368.52</x><y>-127.952756</y><z>-15.36</z></location>
          <capacity unit="LBS">2991</capacity><contents unit="LBS">0</contents>
          <priority>1</priority>
        </tank>
    </propulsion>


    <flight_control name="F-35B">

        <property value="1">stores/external-tank[0]/attached</property>
        <property value="0">propulsion/tank[2]/external-store-index</property>
        <property value="1">stores/external-tank[1]/attached</property>
        <property value="1">propulsion/tank[3]/external-store-index</property>

      <!-- Declare some interface properties -->
        <property value="0">/sim/model/pushback/target-speed-fps</property>
        <property value="0">/sim/model/pushback/position-norm</property>
        <property value="100">/sim/model/pushback/kp</property>
        <property value="25">/sim/model/pushback/ki</property>
        <property value="0">/sim/model/pushback/kd</property>
        <property value="0">/gear/gear/wow</property>
        <property value="0">fcs/stovl-cmd-norm</property>
        <property value="0">fcs/stovl-pos-norm</property>
        <property value="0">fcs/stovl-augmentation-inhibit</property>
        <property value="0">fcs/control-law-mode</property>
        <property value="1">fcs/fbw-enabled</property>
        <property value="636.6197723675814">fcs/full-stick-roll-rate-deg_sec</property>
        <property value="1">fcs/flaps-auto-enabled</property>
        <property>fcs/alpha-norm</property>
        <property>fcs/canopy-engage</property>
        <property>fcs/fbw-override</property>

        <channel name="External fuel tank attachment">
          <switch name="stores/external-tank[0]/fuel-held">
            <default value="propulsion/tank[2]/contents-lbs"/>
            <test value="0">stores/external-tank[0]/attached lt 0.5</test>
            <output>propulsion/tank[2]/contents-lbs</output>
          </switch>
          <switch name="stores/external-tank[0]/feed-priority">
            <default value="1"/><test value="0">stores/external-tank[0]/attached lt 0.5</test>
            <output>propulsion/tank[2]/priority</output>
          </switch>
          <switch name="stores/external-tank[0]/dry-weight-lbs">
            <default value="300"/><test value="0">stores/external-tank[0]/attached lt 0.5</test>
            <output>inertia/pointmass-weight-lbs[0]</output>
          </switch>
          <switch name="stores/external-tank[1]/fuel-held">
            <default value="propulsion/tank[3]/contents-lbs"/>
            <test value="0">stores/external-tank[1]/attached lt 0.5</test>
            <output>propulsion/tank[3]/contents-lbs</output>
          </switch>
          <switch name="stores/external-tank[1]/feed-priority">
            <default value="1"/><test value="0">stores/external-tank[1]/attached lt 0.5</test>
            <output>propulsion/tank[3]/priority</output>
          </switch>
          <switch name="stores/external-tank[1]/dry-weight-lbs">
            <default value="300"/><test value="0">stores/external-tank[1]/attached lt 0.5</test>
            <output>inertia/pointmass-weight-lbs[1]</output>
          </switch>
        </channel>

        <!-- 0SFS control-law selection, 2026-10-05. Auto (0) resolves to
             this aircraft's native FBW; Manual (1) bypasses stabilization;
             explicit FBW (2) enables it. Pilot commands are never rewritten. -->
        <channel name="Control law mode">
          <switch name="fcs/fbw-enabled">
            <default value="1"/>
            <test value="0">fcs/control-law-mode eq 1</test>
          </switch>
          <fcs_function name="fcs/fbw-override">
            <function><difference><value>1</value><product>
              <property>fcs/fbw-enabled</property>
              <difference><value>1</value><property>fcs/stovl-pos-norm</property></difference>
            </product></difference></function>
          </fcs_function>
        </channel>

        <channel name="Flaps">

 <fcs_function name="tef auto pos rad">
  <function>
   <description>none</description>
   <sum>
   <product>
    <value>1</value>
    <table>
     <independentVar lookup="row">velocities/vc-kts</independentVar>
     <tableData>
      0 0.349
      150 0.349
      200 0
     </tableData>
    </table>
   </product>
   <product>
    <value>1</value>
        <table>
     <independentVar lookup="row">velocities/mach</independentVar>
     <tableData>
      0 0
      0.85 0
      0.95 -0.0349
     </tableData>
    </table>
   </product>
   </sum>
  </function>
 </fcs_function>

   <pure_gain name="tef manual pos rad">
     <input>fcs/flap-cmd-norm</input><gain>0.349</gain>
     <clipto><min>0</min><max>0.349</max></clipto>
   </pure_gain>
   <switch name="tef pos rad">
     <default value="fcs/tef-auto-pos-rad"/>
     <test value="fcs/tef-manual-pos-rad">fcs/flaps-auto-enabled eq 0</test>
   </switch>
   <aerosurface_scale name="flap pos norm">
      <input>fcs/tef-pos-rad</input>
         <domain>
            <min>-0.0349</min>
            <max>0.349</max>
         </domain>
         <range>
            <min>-0.1</min>
            <max>1</max>
         </range>
      <output>fcs/flap-pos-norm</output>
   </aerosurface_scale>

 </channel>

  <channel name="Roll">

            <!-- 0SFS roll-rate command, 2026-10-07. Under fly-by-wire the
                 stick commands a roll rate: full stick asks for the
                 host-written fcs/full-stick-roll-rate-deg_sec. Its default,
                 636.62, is the source gradient of 1/0.09 rad/s, which the
                 host writes while its autopilot owns roll. Manual and the
                 hover roll posts read fcs/aileron-cmd-norm unscaled. -->
            <fcs_function name="fcs/roll-stick-cmd-norm">
              <function><product>
                <property>fcs/aileron-cmd-norm</property>
                <toradians><property>fcs/full-stick-roll-rate-deg_sec</property></toradians>
                <value>0.09</value>
              </product></function>
            </fcs_function>

            <!-- 0SFS roll trim, 2026-10-07: under fly-by-wire roll trim
                 commands a roll rate in the stick's units, so 100% trim asks
                 what full stick asks. It entered unscaled, as 1/0.09 rad/s,
                 637 deg/s, against 30 deg/s at full stick. Manual and the
                 hover roll posts take it as they take the stick. -->
            <fcs_function name="fcs/roll-trim-rate-cmd-norm">
              <function><product>
                <property>fcs/roll-trim-cmd-norm</property>
                <toradians><property>fcs/full-stick-roll-rate-deg_sec</property></toradians>
                <value>0.09</value>
              </product></function>
            </fcs_function>

            <!-- Calculate the normalized roll-rate -->
            <pure_gain name="roll rate norm">
                <input>velocities/p-aero-rad_sec</input>
		<gain>0.09</gain>
            </pure_gain>

            <!--
              - Calculate the difference between actual roll-rate and
              - commanded roll-rate.
              -->
            <summer name="roll trim error">
                <input>fcs/roll-stick-cmd-norm</input>
                <input>-fcs/roll-rate-norm</input>
      <input>fcs/roll-trim-rate-cmd-norm</input>
      <clipto>
        <min> -1 </min>
        <max>  1 </max>
      </clipto>
            </summer>

 <pure_gain name="roll p">
 <input>fcs/roll-trim-error</input>
 <gain>3.00</gain>
 </pure_gain>

            <!-- 0SFS roll integrator, 2026-10-07. The source trigger held
                 this integrator above 5 kt and ran it only when parked, so
                 the loop was proportional and settled at 43-62% of its
                 commanded rate. Feedforward below now supplies the aileron
                 for the commanded rate, and this integrator holds bank. It
                 runs with the stick centred and the roll rate below
                 10 deg/s; it holds while the stick is deflected, while a
                 roll is stopping and while the command is saturated in the
                 error's direction; it resets in Manual, on the ground and
                 with any conversion. -->
            <fcs_function name="fcs/roll-stick-abs">
              <function><abs><property>fcs/aileron-cmd-norm</property></abs></function>
            </fcs_function>
            <fcs_function name="fcs/roll-rate-abs-deg_sec">
              <function><abs><todegrees><property>velocities/p-aero-rad_sec</property></todegrees></abs></function>
            </fcs_function>
            <switch name="aileron trigger">
                <default value="0"/>
                <test logic="OR" value="-1">
                    fcs/fbw-enabled eq 0
                    fcs/stovl-pos-norm gt 0
                    gear/unit[0]/WOW eq 1
                    gear/unit[1]/WOW eq 1
                    gear/unit[2]/WOW eq 1
                </test>
                <test logic="OR" value="1">
                    fcs/roll-stick-abs gt 0.02
                    fcs/roll-rate-abs-deg_sec gt 10
                    <test logic="AND">
                        fcs/roll-command ge 1
                        fcs/roll-trim-error gt 0
                    </test>
                    <test logic="AND">
                        fcs/roll-command le -1
                        fcs/roll-trim-error lt 0
                    </test>
                </test>
            </switch>

 <integrator name="roll i">
 <input>fcs/roll-trim-error</input>
 <trigger>fcs/aileron-trigger</trigger>
 <c1>10</c1>
 </integrator>

 <lead_lag_filter name="roll d">
 <input>fcs/roll-trim-error</input>
 <c1>0.00125</c1>
 <c2>0.0</c2>
 <c3>0.000125</c3>
 <c4>1</c4>
 </lead_lag_filter>

            <!-- 0SFS roll feedforward, 2026-10-07: the aileron that holds the
                 commanded rate, p = a vt / 165 ft. Under Manual at
                 10,000 ft the clean aircraft gives 150-175 ft between 200
                 and 450 kt; 165 tracks closest in closed loop. Conversion
                 fades it out. -->
            <fcs_function name="fcs/roll-feedforward">
              <function><product>
                <quotient>
                  <sum><property>fcs/roll-stick-cmd-norm</property><property>fcs/roll-trim-rate-cmd-norm</property></sum>
                  <value>0.09</value>
                </quotient>
                <quotient>
                  <value>165</value>
                  <max><property>velocities/vt-fps</property><value>200</value></max>
                </quotient>
                <difference><value>1</value><property>fcs/stovl-pos-norm</property></difference>
              </product></function>
              <clipto><min>-1</min><max>1</max></clipto>
            </fcs_function>

 <summer name="roll command">
 <input>fcs/roll-feedforward</input>
 <input>fcs/roll-p</input>
 <input>fcs/roll-i</input>
 <input>fcs/roll-d</input>
 <clipto>
 <min>-1</min>
 <max>1</max>
 </clipto>
 </summer>

            <summer name="roll manual command">
              <input>fcs/aileron-cmd-norm</input><input>fcs/roll-trim-cmd-norm</input>
              <clipto><min>-1</min><max>1</max></clipto>
            </summer>
            <switch name="roll actuator command">
              <default value="fcs/roll-command"/>
              <test value="fcs/roll-manual-command">fcs/fbw-enabled eq 0</test>
            </switch>
            <kinematic name="roll trim sum">
                <input>fcs/roll-actuator-command</input>
                <traverse>
                    <setting>
                        <position>-1</position>
                        <time>0.35</time>
                    </setting>
                    <setting>
                        <position>1</position>
                        <time>0.35</time>
                    </setting>
                </traverse>
                <output>fcs/roll-trim-sum</output>
            </kinematic>

   <aerosurface_scale name="left-aileron-pos-rad">
      <input>fcs/roll-trim-sum</input>
      <range>
        <min> -0.40 </min>
        <max>  0.40 </max>
      </range>
      <output>fcs/left-aileron-pos-rad</output>
   </aerosurface_scale>

   <aerosurface_scale name="Aileron Pos Norm">
      <input>fcs/left-aileron-pos-rad</input>
         <domain>
            <min>-0.40</min>
            <max>0.40</max>
         </domain>
         <range>
            <min>-1</min>
            <max>1</max>
         </range>
      <output>fcs/aileron-pos-norm</output>
   </aerosurface_scale>

  </channel>


 <channel name="Pitch">

            <!--
              - The F-16 has a G limit of 9G positive and 4G negative (44.44%
              - of 9G). This section limits the stick output to 100% up and 44%
              - down.
              -->

 <summer name="elevator-cmd-limiter">
 <input>fcs/elevator-cmd-norm</input>
 <input>fcs/pitch-trim-cmd-norm</input>
 <clipto>
 <min>-1</min>
 <max>0.44</max>
 </clipto>
 </summer>

 <fcs_function name="fcs/g-load-norm">
  <function>
   <description>none</description>
   <product>
    <value>1</value>
    <table>
     <independentVar lookup="row">accelerations/n-pilot-z-norm</independentVar>
     <tableData>
      -12 0.8
      -4 0
      0 0
      2.33 0
      7 -0.8
     </tableData>
    </table>
   </product>
  </function>
 </fcs_function>

 <fcs_function name="fcs/alpha-limiter">
  <function>
   <description>none</description>
   <product>
    <property>aero/alpha-rad</property>
    <value>1.0472</value>
    <table>
     <independentVar lookup="row">fcs/fbw-override</independentVar>
     <tableData>
      0 1
      1 0
     </tableData>
    </table>
   </product>
  </function>
 </fcs_function>

 <summer name="g load error">
 <input>fcs/elevator-cmd-limiter</input>
 <input>fcs/g-load-norm</input>
 <input>fcs/alpha-limiter</input>
 </summer>

 <pure_gain name="g load p">
 <input>fcs/g-load-error</input>
 <gain>0.66</gain>
 </pure_gain>

            <!--
              - Make sure the integrator is only active when the aircraft
              - has gained some speed. This will prevent bad behaviour when the
              - aircraft has been parked for a while.
              -->
            <switch name="elevator trigger">
                <default value="1"/>
                <test value="-1">fcs/fbw-enabled eq 0</test>
                <test value="0">
                    velocities/vc-kts lt 5.0
                </test>
            </switch>

 <integrator name="g load i">
 <input>fcs/g-load-error</input>
 <trigger>fcs/elevator-trigger</trigger>
 <c1>0.005</c1>
 </integrator>

 <lead_lag_filter name="g load d">
 <input>fcs/g-load-error</input>
 <c1>0.000125</c1>
 <c2>0.0</c2>
 <c3>0.0000125</c3>
 <c4>1</c4>
 </lead_lag_filter>

 <summer name="g load command">
 <input>fcs/g-load-p</input>
 <input>fcs/g-load-i</input>
 <input>fcs/g-load-d</input>
 <clipto>
 <min>-1</min>
 <max>1</max>
 </clipto>
 </summer>

            <summer name="pitch manual command">
              <input>fcs/elevator-cmd-norm</input><input>fcs/pitch-trim-cmd-norm</input>
              <clipto><min>-1</min><max>1</max></clipto>
            </summer>
            <switch name="pitch actuator command">
              <default value="fcs/g-load-command"/>
              <test value="fcs/pitch-manual-command">fcs/fbw-enabled eq 0</test>
            </switch>
            <kinematic name="elevator position">
                <input>fcs/pitch-actuator-command</input>
                <traverse>
                    <setting>
                        <position>-1</position>
                        <time>0.35</time>
                    </setting>
                    <setting>
                        <position>1</position>
                        <time>0.35</time>
                    </setting>
                </traverse>
                <output>fcs/elevator-pos-norm</output>
            </kinematic>

 <aerosurface_scale name="elevator-pos-rad">
 <input>fcs/elevator-pos-norm</input>
 <range>
 <min>-0.79</min>
 <max>0.79</max>
 </range>
  <output>fcs/elevator-pos-rad</output>
 </aerosurface_scale>

 </channel>

        <channel name="Yaw">
            <!-- Calculate the normalized yaw-rate -->
            <pure_gain name="yaw rate norm">
                <input>velocities/r-aero-rad_sec</input>
                <gain>100</gain>
            </pure_gain>

            <!-- Calculate the normalized yaw-load -->
            <pure_gain name="yaw load norm">
                <input>accelerations/n-pilot-y-norm</input>
                <gain>0.25</gain>
            </pure_gain>

            <!--
              - Calculate the difference between the current yaw-rate
              - and the one requiested for.
              -->
            <summer name="yaw trim error">
                <input>fcs/rudder-cmd-norm</input>
                <input>fcs/yaw-rate-norm</input>
                <input>fcs/yaw-load-norm</input>
            </summer>

            <!--
              - Make sure the PID controller is only active when the aircraft
              - has gained some speed. This will prevent bad behaviour when the
              - aircraft has been parked for a while.
              -->
            <switch name="rudder pid trigger">
                <default value="1"/>
                <test value="-1">fcs/fbw-enabled eq 0</test>
                <test value="0">
                    velocities/vc-kts lt 10.0
                </test>
            </switch>

            <pid name="yaw load pid">
              <trigger>fcs/rudder-pid-trigger</trigger>
              <input>fcs/yaw-trim-error</input>
              <kp> 0.105500 </kp>
              <ki> 0.000010 </ki>
              <kd> 0.00005 </kd>
              <clipto>
                <min>-1</min>
                <max>1</max>
              </clipto>
              <output>fcs/yaw-load-pid</output>
            </pid>

            <!-- Constant source yaw gain hunted against the rate-limited
                 rudder above the 300kt development start. Scale pilot and
                 feedback together so the steady rate demand is retained.
                 300psf is experimental tuning, not an F-35 control law. -->
            <fcs_function name="yaw gain schedule">
              <function><min><value>1</value><quotient><value>300</value>
                <max><value>1</value><property>aero/qbar-psf</property></max>
              </quotient></min></function>
            </fcs_function>
            <fcs_function name="yaw fbw command">
              <function><product><property>fcs/yaw-gain-schedule</property><sum>
                <property>fcs/rudder-cmd-norm</property>
                <property>fcs/yaw-trim-cmd-norm</property>
                <property>fcs/yaw-load-pid</property>
              </sum></product></function>
              <clipto><min>-1</min><max>1</max></clipto>
            </fcs_function>
            <summer name="yaw manual command">
              <input>fcs/rudder-cmd-norm</input><input>fcs/yaw-trim-cmd-norm</input>
              <clipto><min>-1</min><max>1</max></clipto>
            </summer>
            <switch name="yaw scheduler">
              <default value="fcs/yaw-fbw-command"/>
              <test value="fcs/yaw-manual-command">fcs/fbw-enabled eq 0</test>
            </switch>

            <kinematic name="rudder position">
                <input>fcs/yaw-scheduler</input>
                <traverse>
                    <setting>
                        <position>-1</position>
                        <time>0.35</time>
                    </setting>
                    <setting>
                        <position>1</position>
                        <time>0.35</time>
                    </setting>
                </traverse>
                <output>fcs/rudder-position</output>
            </kinematic>

<lag_filter name="rudder pos norm">
<input>-fcs/rudder-position</input>
<c1>10</c1>
<clipto>
<min>-1</min>
<max>1</max>
</clipto>
<output>fcs/rudder-pos-norm</output>
</lag_filter>

            <aerosurface_scale name="Rudder Control">
                <input>-fcs/rudder-pos-norm</input>
                <range>
                    <min>-0.524</min>
                    <max>0.524</max>
                </range>
                <output>fcs/rudder-pos-rad</output>
            </aerosurface_scale>

<lag_filter name="rudder-cmd-norm-filtered">
<input>fcs/rudder-cmd-norm</input>
<c1>2</c1>
<clipto>
<min>-1</min>
<max>1</max>
</clipto>
<output>fcs/rudder-cmd-norm-filtered</output>
</lag_filter>

        </channel>


        <channel name="Leading Edge Flap">

            <switch name="lef pos rad">
                <default value="0.0"/>
                <test value="0">fcs/fbw-enabled eq 0</test>
                <test logic="AND" value="-0.0349">
                    fcs/gear-wow eq 1
                    gear/gear-pos-norm gt 0
                </test>
                <test logic="AND" value="0.436">
                    gear/gear-pos-norm eq 0
                    aero/alpha-rad gt 0.2618
                </test>
                <test logic="AND" value="0.262">
                    fcs/gear-wow eq 0
                    aero/alpha-rad gt 0.0873
                </test>
                <test logic="AND" value="-0.0349">
                    velocities/mach gt 0.9
                </test>
            </switch>

            <pure_gain name="slat pos norm">
              <input>fcs/lef-pos-rad</input>
              <gain>2.293578</gain>
            </pure_gain>

            <kinematic name="lef control">
                <input>fcs/slat-pos-norm</input>
                <traverse>
                    <setting>
                        <position>-1.0</position>
                        <time>3.0</time>
                    </setting>
                    <setting>
                        <position>1.0</position>
                        <time>3.0</time>
                    </setting>
                </traverse>
            </kinematic>

            <aerosurface_scale name="lef pos deg">
              <input>fcs/lef-control</input>
              <domain>
                <min>-1.0</min>
                <max>1.0</max>
              </domain>
              <range>
                <min>-25</min>
                <max>25</max>
              </range>
            </aerosurface_scale>

        </channel>

        <!-- 0SFS experimental STOVL plant, 2026-10-05. Physical force points
             follow the inspected exterior fan disk and nozzle exit; CG, aero
             coefficients and inertias remain the source trial assumptions.
             Auxiliary turbine instances are force surrogates, not four engines. -->
        <channel name="STOVL conversion and control">
          <!-- Sample the requested and pre-step physical conversion before
               the kinematic node. Any positive conversion inhibits reheat.
               Retain the inhibit through zero-time trim evaluations because
               recovery restores the physical actuator after RunIC; release
               on a normal step once request and pre-step position are zero. -->
          <switch name="fcs/stovl-augmentation-inhibit">
            <default value="0"/>
            <test logic="OR" value="1">
              fcs/stovl-cmd-norm gt 0
              fcs/stovl-pos-norm gt 0
            </test>
            <test logic="AND" value="1">
              simulation/dt eq 0
              fcs/stovl-augmentation-inhibit gt 0.5
            </test>
          </switch>
          <kinematic name="fcs/stovl-position">
            <input>fcs/stovl-cmd-norm</input>
            <traverse>
              <setting><position>0</position><time>0</time></setting>
              <setting><position>1</position><time>2.5</time></setting>
            </traverse>
            <output>fcs/stovl-pos-norm</output>
          </kinematic>
          <pure_gain name="fcs/nozzle-pitch-rad">
            <input>fcs/stovl-pos-norm</input><gain>1.5707963267948966</gain>
          </pure_gain>
          <fcs_function name="fcs/stovl-pitch-auto">
            <function><sum>
              <product><value>1.5</value><sum>
                <product><value>-0.2</value><property>fcs/elevator-cmd-norm</property></product>
                <property>-attitude/theta-rad</property>
              </sum></product>
              <product><value>-0.8</value><property>velocities/q-rad_sec</property></product>
            </sum></function>
            <clipto><min>-0.8</min><max>0.8</max></clipto>
          </fcs_function>
          <fcs_function name="fcs/stovl-roll-auto">
            <function><sum>
              <product><value>2</value><sum>
                <product><value>0.25</value><property>fcs/aileron-cmd-norm</property></product>
                <property>-attitude/phi-rad</property>
              </sum></product>
              <product><value>-0.8</value><property>velocities/p-rad_sec</property></product>
            </sum></function>
            <clipto><min>-0.8</min><max>0.8</max></clipto>
          </fcs_function>
          <fcs_function name="fcs/stovl-pitch-manual">
            <function><product><value>-0.3</value><sum>
              <property>fcs/elevator-cmd-norm</property><property>fcs/pitch-trim-cmd-norm</property>
            </sum></product></function>
            <clipto><min>-0.8</min><max>0.8</max></clipto>
          </fcs_function>
          <fcs_function name="fcs/stovl-roll-manual">
            <function><product><value>0.5</value><sum>
              <property>fcs/aileron-cmd-norm</property><property>fcs/roll-trim-cmd-norm</property>
            </sum></product></function>
            <clipto><min>-0.8</min><max>0.8</max></clipto>
          </fcs_function>
          <switch name="fcs/stovl-pitch-control">
            <default value="fcs/stovl-pitch-auto"/>
            <test value="fcs/stovl-pitch-manual">fcs/fbw-enabled eq 0</test>
          </switch>
          <switch name="fcs/stovl-roll-control">
            <default value="fcs/stovl-roll-auto"/>
            <test value="fcs/stovl-roll-manual">fcs/fbw-enabled eq 0</test>
          </switch>
          <fcs_function name="fcs/nozzle-yaw-rad">
            <function><product><property>fcs/stovl-pos-norm</property><sum>
              <product><value>0.17</value><property>fcs/rudder-cmd-norm</property></product>
              <product><value>0.35</value><property>fcs/fbw-enabled</property><property>velocities/r-rad_sec</property></product>
            </sum></product></function>
            <clipto><min>-0.17</min><max>0.17</max></clipto>
          </fcs_function>
          <!-- Native thruster Euler angles encode the physically tilted nozzle
               vector; direct Euler yaw at vertical pitch has no yaw authority. -->
          <fcs_function name="fcs/nozzle-direction-x">
            <function><cos><property>fcs/nozzle-pitch-rad</property></cos></function>
          </fcs_function>
          <fcs_function name="fcs/nozzle-direction-y">
            <function><product>
              <sin><property>fcs/nozzle-pitch-rad</property></sin>
              <sin><property>fcs/nozzle-yaw-rad</property></sin>
            </product></function>
          </fcs_function>
          <fcs_function name="fcs/nozzle-direction-up">
            <function><product>
              <sin><property>fcs/nozzle-pitch-rad</property></sin>
              <cos><property>fcs/nozzle-yaw-rad</property></cos>
            </product></function>
          </fcs_function>
          <fcs_function name="fcs/nozzle-native-pitch">
            <function><atan2><property>fcs/nozzle-direction-up</property><sqrt><sum>
              <pow><property>fcs/nozzle-direction-x</property><value>2</value></pow>
              <pow><property>fcs/nozzle-direction-y</property><value>2</value></pow>
            </sum></sqrt></atan2></function>
            <output>propulsion/engine[0]/pitch-angle-rad</output>
          </fcs_function>
          <fcs_function name="fcs/nozzle-native-yaw">
            <function><atan2><property>fcs/nozzle-direction-y</property>
              <property>fcs/nozzle-direction-x</property></atan2></function>
            <output>propulsion/engine[0]/yaw-angle-rad</output>
          </fcs_function>
          <!-- LiftSystem commands to the coupled engine plant. The clutch
               engages for any conversion and the lift-fan nozzle opens with
               it. The engine holds the commanded ratio of lift-fan to
               main-nozzle thrust by trimming its nozzle area, which balances
               the two about the centre of gravity and carries the pitch
               command. Roll posts open with the nozzle's vertical share and
               carry the roll command differentially. -->
          <switch name="fcs/lift-fan-clutch-cmd-norm">
            <default value="0"/>
            <test logic="OR" value="1">
              fcs/stovl-cmd-norm gt 0
              fcs/stovl-pos-norm gt 0
            </test>
          </switch>
          <!-- Lift-fan nozzle opening for a thrust that follows the main
               nozzle's vertical share: fan thrust rises about as
               1 - (1 - opening)^1.7 at a given fan speed. -->
          <fcs_function name="fcs/lift-fan-door-cmd-norm">
            <function><difference><value>1</value>
              <pow><max><value>0</value><difference><value>1</value><sin><property>fcs/nozzle-pitch-rad</property></sin></difference></max><value>0.6</value></pow>
            </difference></function>
            <clipto><min>0</min><max>1</max></clipto>
          </fcs_function>
          <fcs_function name="fcs/lift-split-balance">
            <function><product>
              <sin><property>fcs/nozzle-pitch-rad</property></sin>
              <quotient>
                <max><value>0</value><difference><property>propulsion/engine[0]/x-position</property><property>inertia/cg-x-in</property></difference></max>
                <max><value>1</value><difference><property>inertia/cg-x-in</property><value>198.02286181</value></difference></max>
              </quotient>
              <sum><value>1</value><property>fcs/stovl-pitch-control</property></sum>
            </product></function>
            <clipto><min>0.02</min><max>5</max></clipto>
          </fcs_function>
          <switch name="fcs/lift-split-cmd">
            <default value="0"/>
            <test value="fcs/lift-split-balance">fcs/stovl-pos-norm gt 0</test>
          </switch>
          <fcs_function name="fcs/roll-post-right-cmd-norm">
            <function><product>
              <value>0.93</value><sin><property>fcs/nozzle-pitch-rad</property></sin>
              <sum><value>1</value><property>-fcs/stovl-roll-control</property></sum>
            </product></function>
            <clipto><min>0</min><max>1</max></clipto>
          </fcs_function>
          <fcs_function name="fcs/roll-post-left-cmd-norm">
            <function><product>
              <value>0.93</value><sin><property>fcs/nozzle-pitch-rad</property></sin>
              <sum><value>1</value><property>fcs/stovl-roll-control</property></sum>
            </product></function>
            <clipto><min>0</min><max>1</max></clipto>
          </fcs_function>
          <fcs_function name="fcs/fan-door-mixture-position">
            <function><difference><value>1</value><property>fcs/stovl-pos-norm</property></difference></function>
            <output>fcs/mixture-pos-norm</output>
          </fcs_function>
          <switch name="fcs/main-throttle-command">
            <default value="fcs/throttle-cmd-norm"/>
            <test logic="AND" value="0.99">
              fcs/stovl-augmentation-inhibit gt 0.5
              fcs/throttle-cmd-norm gt 0.99
            </test>
          </switch>
        </channel>

        <channel name="Throttle">

            <pure_gain name="throttle-pos-norm">
                <input>fcs/main-throttle-command</input>
                <gain>1</gain>
                <output>fcs/throttle-pos-norm</output>
            </pure_gain>

        </channel>

        <channel name="Speedbrake">
            <!--
              - To prevent deep stall the Flight Computer commands speedbrake
              - deflection at high angle of attack (alpha) and low speeds. This
              - will provide just enough pitch down moment to keep the aircraft
              - under control.
              -->
            <switch name="speedbrake alpha limiter">
                <default value="0"/>
                <test logic="AND" value="1">
                    aero/alpha-deg ge 53
                    velocities/v-fps le 18
		    fcs/fbw-override == 0
                </test>
            </switch>

            <switch name="speedbrake initiate">
                <default value="0"/>
                <test logic="OR" value="1">
                    fcs/speedbrake-alpha-limiter eq 1
                    fcs/speedbrake-cmd-norm eq 1
                </test>
            </switch>

            <!--
              - Speedbrake deflection is limited to 43 degrees (instead of 60
              - degrees) when the gear is extended to prevent physical
              - speedbrake damage on touchdown.
              -->
            <scheduled_gain name="speedbrake scheduler">
                <input>fcs/speedbrake-initiate</input>
                <table>
                    <independentVar>gear/gear-cmd-norm</independentVar>
                    <tableData>
                        0    1.0
                        1    0.71667
                    </tableData>
                </table>
                <output>fcs/steer-pos-deg</output>
            </scheduled_gain>

            <kinematic name="Speedbrake Control">
                <input>fcs/speedbrake-scheduler</input>
                <traverse>
                    <setting>
                        <position>0</position>
                        <time>0</time>
                    </setting>
                    <setting>
                        <position>60</position>
                        <time>1</time>
                    </setting>
                </traverse>
                <output>fcs/speedbrake-pos-deg</output>
            </kinematic>

           <aerosurface_scale name="Speedbrake Pos Norm">
              <input>fcs/speedbrake-control</input>
              <domain>
                <min>0</min>
                <max>60</max>
              </domain>
              <range>
                <min>0</min>
                <max>1</max>
              </range>
              <output>fcs/speedbrake-pos-norm</output>
            </aerosurface_scale>

        </channel>

        <channel name="Canopy">

            <kinematic name="Canopy Control">
                <input>fcs/canopy-engage</input>
                <traverse>
                    <setting>
                        <position>0</position>
                        <time>0</time>
                    </setting>
                    <setting>
                        <position>1</position>
                        <time>10</time>
                    </setting>
                </traverse>
                <output>fcs/canopy-pos-norm</output>
            </kinematic>

        </channel>

        <channel name="Landing Gear">

            <switch name="gear-wow">
                <default value="0"/>
                <test logic="AND" value="1">
                    gear/unit[1]/WOW eq 1
                    gear/unit[2]/WOW eq 1
                </test>
            </switch>

            <kinematic name="Gear Control">
                <input>gear/gear-cmd-norm</input>
                <traverse>
                    <setting>
                        <position>0</position>
                        <time>0</time>
                    </setting>
                    <setting>
                        <position>1</position>
                        <time>5</time>
                    </setting>
                </traverse>
                <output>gear/gear-pos-norm</output>
            </kinematic>

            <scheduled_gain name="Scheduled Steer Pos Deg">
                <input>fcs/steer-cmd-norm</input>
                <table>
                    <independentVar>velocities/vg-fps</independentVar>
                    <tableData>
                        10.0        80.0
                        50.0        15.0
                        150.0       2.0
                    </tableData>
                </table>
                <output>fcs/steer-pos-deg</output>
            </scheduled_gain>

        </channel>

    </flight_control>

 <aerodynamics>

  <axis name="LIFT">

    <function name="aero/coefficient/CLalpha">
      <description>Lift_due_to_alpha</description>
      <product>
          <property>aero/qbar-psf</property>
          <property>metrics/Sw-sqft</property>
          <table>
            <independentVar lookup="row">aero/alpha-rad</independentVar>
            <tableData>
 -3.14 -0.300
 -2.60 -0.800
 -2.08 -0.800
 -1.57 0.000
 -1.00 -2.000
 -0.20 -1.280
 0.00 0.078
 0.09 0.581
 0.17 1.013
 0.26 1.279
 0.52 1.800
 0.61 1.800
 1.00 1.400
 1.20 0.200
 1.57 0.000
 2.08 0.800
 2.60 0.800
 3.14 -0.300
            </tableData>
          </table>
      </product>
    </function>

    <function name="aero/coefficient/dCLflap">
       <description>Delta_Lift_due_to_flaps</description>
       <product>
           <property>aero/qbar-psf</property>
           <property>metrics/Sw-sqft</property>
           <property>fcs/tef-pos-rad</property>
           <value> 0.66 </value>
       </product>
    </function>

    <function name="aero/coefficient/dCLsb">
       <description>Delta_Lift_due_to_speedbrake</description>
       <product>
           <property>aero/qbar-psf</property>
           <property>metrics/Sw-sqft</property>
           <property>fcs/speedbrake-pos-norm</property>
           <value>0</value>
       </product>
    </function>

    <function name="aero/coefficient/CLde">
       <description>Lift_due_to_Elevator_Deflection</description>
       <product>
           <property>aero/qbar-psf</property>
           <property>metrics/Sw-sqft</property>
           <property>fcs/elevator-pos-rad</property>
           <value>0.2</value>
       </product>
    </function>

  </axis>

  <axis name="DRAG">


    <function name="aero/coefficient/CD0">
       <description>Drag_at_zero_lift</description>
       <product>
          <property>aero/qbar-psf</property>
          <property>metrics/Sw-sqft</property>
          <table>
            <independentVar lookup="row">aero/alpha-rad</independentVar>
            <tableData>
 -3.14 0.300
 -1.57 1.500
 -0.26 0.240
 -0.1750 0.1560
 -0.0870 0.0410
 0.0000 0.0210
 0.0870 0.0400
 0.1750 0.0960
 0.2620 0.1820
 0.3490 0.3470
 0.4360 0.5770
 0.5240 0.8260
 0.6110 1.0840
 0.6980 1.3260
 0.7850 1.4780
 1.57 1.500
 3.14 0.300
            </tableData>
          </table>
       </product>
    </function>

    <function name="aero/coefficient/CDi">
       <description>Induced_drag</description>
         <product>
           <property>aero/qbar-psf</property>
           <property>metrics/Sw-sqft</property>
           <property>aero/cl-squared</property>
           <value>0.12</value>
         </product>
    </function>

    <function name="aero/coefficient/CDmach">
       <description>Drag_due_to_mach</description>
        <product>
          <property>aero/qbar-psf</property>
          <property>metrics/Sw-sqft</property>
          <table>
            <independentVar lookup="row">velocities/mach</independentVar>
            <tableData>
                0.00      0.000
                0.81      0.000
                1.10      0.023
                1.80      0.015
            </tableData>
          </table>
        </product>
    </function>

    <function name="aero/coefficient/CDflap">
       <description>Drag_due_to_flaps</description>
         <product>
           <property>aero/qbar-psf</property>
           <property>metrics/Sw-sqft</property>
           <property>fcs/tef-pos-rad</property>
           <value> 0.15219 </value>
         </product>
    </function>

    <function name="aero/coefficient/CDgear">
       <description>Drag_due_to_gear</description>
         <product>
           <property>aero/qbar-psf</property>
           <property>metrics/Sw-sqft</property>
           <property>gear/gear-pos-norm</property>
           <value>0.02</value>
         </product>
    </function>

    <function name="aero/coefficient/CDsb">
       <description>Drag_due_to_speedbrakes</description>
         <product>
           <property>aero/qbar-psf</property>
           <property>metrics/Sw-sqft</property>
           <property>fcs/speedbrake-pos-norm</property>
           <value>0.021</value>
         </product>
    </function>

    <function name="aero/coefficient/CDft">
       <description>Drag_due_to_fan_trap</description>
         <product>
           <property>aero/qbar-psf</property>
           <property>metrics/Sw-sqft</property>
          <table>
            <independentVar lookup="row">fcs/mixture-pos-norm</independentVar>
            <tableData>
              0 1
              1 0
            </tableData>
          </table>
           <value>0.031</value>
         </product>
    </function>

    <function name="aero/coefficient/CDbeta">
       <description>Drag_due_to_sideslip</description>
       <product>
          <property>aero/qbar-psf</property>
          <property>metrics/Sw-sqft</property>
          <table>
            <independentVar lookup="row">aero/beta-rad</independentVar>
            <tableData>
              -1.57       1.230
              -0.26    0.050
               0.00       0.000
               0.26    0.050
               1.57       1.230
            </tableData>
          </table>
       </product>
    </function>

    <function name="aero/coefficient/CDde">
       <description>Drag_due_to_Elevator_Deflection</description>
       <product>
           <property>aero/qbar-psf</property>
           <property>metrics/Sw-sqft</property>
           <abs><property>fcs/elevator-pos-norm</property></abs>
           <value>0.04</value>
       </product>
    </function>

  </axis>

  <axis name="SIDE">

    <function name="aero/coefficient/CYb">
       <description>Side_force_due_to_beta</description>
       <product>
           <property>aero/qbar-psf</property>
           <property>metrics/Sw-sqft</property>
           <property>aero/beta-rad</property>
           <value>-1</value>
       </product>
    </function>

  </axis>

  <axis name="ROLL">

    <function name="aero/coefficient/Clb">
       <description>Roll_moment_due_to_beta</description>
       <product>
           <property>aero/qbar-psf</property>
           <property>metrics/Sw-sqft</property>
           <property>metrics/bw-ft</property>
           <property>aero/beta-rad</property>
           <value>-0.01</value>
       </product>
    </function>

    <function name="aero/coefficient/Clp">
       <description>Roll_moment_due_to_roll_rate</description>
       <product>
           <property>aero/qbar-psf</property>
           <property>metrics/Sw-sqft</property>
           <property>metrics/bw-ft</property>
           <property>aero/bi2vel</property>
           <property>velocities/p-aero-rad_sec</property>
           <value>-0.4</value>
       </product>
    </function>

    <function name="aero/coefficient/Clr">
       <description>Roll_moment_due_to_yaw_rate</description>
       <product>
           <property>aero/qbar-psf</property>
           <property>metrics/Sw-sqft</property>
           <property>metrics/bw-ft</property>
           <property>aero/bi2vel</property>
           <property>velocities/r-aero-rad_sec</property>
           <value>0.15</value>
       </product>
    </function>

    <function name="aero/coefficient/Clda">
       <description>Roll_moment_due_to_aileron</description>
       <product>
          <property>aero/qbar-psf</property>
          <property>metrics/Sw-sqft</property>
          <property>metrics/bw-ft</property>
          <property>fcs/left-aileron-pos-rad</property>
	  <value>1.5</value> <!-- to match real datas -->
          <table>
            <independentVar lookup="row">velocities/mach</independentVar>
            <tableData>
              0.0    0.110
              1.0    0.067
            </tableData>
          </table>
       </product>
    </function>

    <function name="aero/coefficient/Cldr">
       <description>Roll_moment_due_to_rudder</description>
       <product>
           <property>aero/qbar-psf</property>
           <property>metrics/Sw-sqft</property>
           <property>metrics/bw-ft</property>
           <property>fcs/rudder-pos-rad</property>
           <value>0.01</value>
       </product>
    </function>

  </axis>

  <axis name="PITCH">

    <function name="aero/coefficient/Cmalpha">
       <description>Pitch_moment_due_to_alpha</description>
       <product>
           <property>aero/qbar-psf</property>
           <property>metrics/Sw-sqft</property>
           <property>metrics/cbarw-ft</property>
           <property>aero/alpha-rad</property>
           <value>-0.3</value>
       </product>
    </function>

    <function name="aero/coefficient/Cmde">
       <description>Pitch_moment_due_to_elevator</description>
       <product>
          <property>aero/qbar-psf</property>
          <property>metrics/Sw-sqft</property>
          <property>metrics/cbarw-ft</property>
          <property>fcs/elevator-pos-rad</property>
          <table>
            <independentVar lookup="row">velocities/mach</independentVar>
            <tableData>
              0.0     -0.800
              2.0     -0.200
            </tableData>
          </table>
       </product>
    </function>

    <function name="aero/coefficient/Cmq">
       <description>Pitch_moment_due_to_pitch_rate</description>
       <product>
           <property>aero/qbar-psf</property>
           <property>metrics/Sw-sqft</property>
           <property>metrics/cbarw-ft</property>
           <property>aero/ci2vel</property>
           <property>velocities/q-aero-rad_sec</property>
           <value>-18</value>
       </product>
    </function>

    <function name="aero/coefficient/Cmadot">
       <description>Pitch_moment_due_to_alpha_rate</description>
       <product>
           <property>aero/qbar-psf</property>
           <property>metrics/Sw-sqft</property>
           <property>metrics/cbarw-ft</property>
           <property>aero/ci2vel</property>
           <property>aero/alphadot-rad_sec</property>
           <value>-9</value>
       </product>
    </function>

  </axis>

  <axis name="YAW">

    <function name="aero/coefficient/Cnb">
       <description>Yaw_moment_due_to_beta</description>
       <product>
           <property>aero/qbar-psf</property>
           <property>metrics/Sw-sqft</property>
           <property>metrics/bw-ft</property>
           <property>aero/beta-rad</property>
           <value>0.12</value>
       </product>
    </function>

    <function name="aero/coefficient/Cnr">
       <description>Yaw_moment_due_to_yaw_rate</description>
       <product>
           <property>aero/qbar-psf</property>
           <property>metrics/Sw-sqft</property>
           <property>metrics/bw-ft</property>
           <property>aero/bi2vel</property>
           <property>velocities/r-aero-rad_sec</property>
           <value>-0.15</value>
       </product>
    </function>

    <function name="aero/coefficient/Cndr">
       <description>Yaw_moment_due_to_rudder</description>
       <product>
           <property>aero/qbar-psf</property>
           <property>metrics/Sw-sqft</property>
           <property>metrics/bw-ft</property>
           <property>fcs/rudder-pos-rad</property>
           <value>-0.1</value>
       </product>
    </function>

    <function name="aero/coefficient/Cnda">
       <description>Adverse_yaw</description>
       <product>
           <property>aero/qbar-psf</property>
           <property>metrics/Sw-sqft</property>
           <property>metrics/bw-ft</property>
           <property>fcs/left-aileron-pos-rad</property>
           <value>0</value>
       </product>
    </function>

  </axis>

 </aerodynamics>


    <system file="pushback"/>
    <external_reactions>
      <!-- Provisional equivalent drag area: 1 square foot per attached tank/pylon.
           Each force acts at its store so asymmetric carriage has native moments. -->
      <force name="external-tank-0-drag" frame="WIND">
        <function name="stores/external-tank[0]/drag-lbs">
          <product><property>aero/qbar-psf</property><value>1</value>
            <property>stores/external-tank[0]/attached</property>
          </product>
        </function>
        <location unit="IN"><x>368.52</x><y>127.952756</y><z>-15.36</z></location>
        <direction><x>-1</x><y>0</y><z>0</z></direction>
      </force>
      <force name="external-tank-1-drag" frame="WIND">
        <function name="stores/external-tank[1]/drag-lbs">
          <product><property>aero/qbar-psf</property><value>1</value>
            <property>stores/external-tank[1]/attached</property>
          </product>
        </function>
        <location unit="IN"><x>368.52</x><y>-127.952756</y><z>-15.36</z></location>
        <direction><x>-1</x><y>0</y><z>0</z></direction>
      </force>

      <!-- LiftSystem outlets of the coupled engine plant: the lift fan and
           the two roll posts each push straight up at their own station. -->
      <force name="lift-fan" frame="BODY">
        <function name="propulsion/lift-fan-force-lbs">
          <property>propulsion/engine[0]/plant/lift-fan/gross-thrust-lbs</property>
        </function>
        <location unit="IN"><x>198.02286181</x><y>0</y><z>-15.36</z></location>
        <direction><x>0</x><y>0</y><z>-1</z></direction>
      </force>
      <force name="roll-post-right" frame="BODY">
        <function name="propulsion/roll-post-right-force-lbs">
          <property>propulsion/engine[0]/plant/roll-post[1]/gross-thrust-lbs</property>
        </function>
        <location unit="IN"><x>368.52</x><y>80</y><z>-15.36</z></location>
        <direction><x>0</x><y>0</y><z>-1</z></direction>
      </force>
      <force name="roll-post-left" frame="BODY">
        <function name="propulsion/roll-post-left-force-lbs">
          <property>propulsion/engine[0]/plant/roll-post[0]/gross-thrust-lbs</property>
        </function>
        <location unit="IN"><x>368.52</x><y>-80</y><z>-15.36</z></location>
        <direction><x>0</x><y>0</y><z>-1</z></direction>
      </force>
      <!-- Momentum of the air each inlet captures, along the relative wind.
           The engine reports gross thrust; this is its ram drag. -->
      <force name="engine-ram-drag" frame="WIND">
        <function name="propulsion/engine-ram-drag-lbs">
          <property>propulsion/engine[0]/plant/inlet-ram-drag-lbs</property>
        </function>
        <location unit="IN"><x>250</x><y>0</y><z>-15.36</z></location>
        <direction><x>-1</x><y>0</y><z>0</z></direction>
      </force>
      <force name="lift-fan-ram-drag" frame="WIND">
        <function name="propulsion/lift-fan-ram-drag-lbs">
          <property>propulsion/engine[0]/plant/lift-fan/ram-drag-lbs</property>
        </function>
        <location unit="IN"><x>198.02286181</x><y>0</y><z>-15.36</z></location>
        <direction><x>-1</x><y>0</y><z>0</z></direction>
      </force>

      <force name="pushback" frame="BODY">
       <location unit="IN">
        <x>  -2.98081 </x>
        <y>    0.0 </y>
        <z>  -1.9683 </z>
       </location>
       <direction>
        <x>1</x>
        <y>0</y>
        <z>0</z>
       </direction>
      </force>

    </external_reactions>

</fdm_config>
