<?xml version="1.0"?>
<?xml-stylesheet type="text/xsl" href="http://jsbsim.sourceforge.net/JSBSim.xsl"?>
<!--
  GENERATED by scripts/build-sf50-variants.mjs. Do not edit this copy.
  Cirrus Vision Jet G2: shared G1-based development physics, not calibrated for this generation.
  Geometry is derived from the locally archived SF50 POH three-view and is
  documented in planes/Cirrus_Vision_Jet/agent_workspace/measurements/
  sf50_reference.md. Mass, inertia, aerodynamic derivatives, engine schedule,
  and V-tail travel are explicitly provisional engineering estimates. This is
  a functional development model, not a certificated or independently
  validated aircraft simulation.
-->
<fdm_config name="sf50-g2" release="ALPHA" version="2.0"
    xmlns:xsi="http://www.w3.org/2001/XMLSchema-instance"
    xsi:noNamespaceSchemaLocation="http://jsbsim.sourceforge.net/JSBSim.xsd">
  <fileheader>
    <author>0sfs contributors</author>
    <filecreationdate>2026-09-11</filecreationdate>
    <version>0.1</version>
    <description>Cirrus Vision Jet G2 development package; shared G1 baseline, variant calibration pending.</description>
    <note>
      Published planform, span, length, height, gear track, and wheelbase are
      represented directly. The remaining values are labeled estimates pending
      the scenario and source-led calibration work described by the proposal.
    </note>
  </fileheader>

  <metrics>
    <wingarea unit="FT2">195.7</wingarea>
    <wingspan unit="FT">38.7</wingspan>
    <!-- AMM 6-00-2 (2018-07-09), station Figure 15 reproduced in WPR20FA051:
         mean aerodynamic chord 62.2 in. Not span-averaged geometric chord. -->
    <chord unit="FT">5.183333333333333</chord>
    <htailarea unit="FT2">53.8</htailarea>
    <htailarm unit="FT">14.5</htailarm>
    <vtailarea unit="FT2">53.8</vtailarea>
    <vtailarm unit="FT">14.5</vtailarm>
    <location name="AERORP" unit="IN">
      <x>160.0</x><y>0.0</y><z>-40.0</z>
    </location>
    <location name="EYEPOINT" unit="IN">
      <x>92.0</x><y>0.0</y><z>-8.0</z>
    </location>
    <location name="VRP" unit="IN">
      <x>0.0</x><y>0.0</y><z>0.0</z>
    </location>
  </metrics>

  <mass_balance negated_crossproduct_inertia="true">
    <ixx unit="SLUG*FT2">20500</ixx>
    <iyy unit="SLUG*FT2">12800</iyy>
    <izz unit="SLUG*FT2">31000</izz>
    <ixy unit="SLUG*FT2">0</ixy>
    <ixz unit="SLUG*FT2">0</ixz>
    <iyz unit="SLUG*FT2">0</iyz>
    <emptywt unit="LBS">3550</emptywt>
    <location name="CG" unit="IN">
      <x>160.0</x><y>0.0</y><z>-40.0</z>
    </location>
  </mass_balance>

  <ground_reactions>
    <contact name="Nose Gear" type="BOGEY">
      <location unit="IN">
        <x>44.8</x><y>0.0</y><z>-84.0</z>
      </location>
      <static_friction>0.80</static_friction>
      <dynamic_friction>0.50</dynamic_friction>
      <rolling_friction>0.02</rolling_friction>
      <spring_coeff unit="LBS/FT">42000</spring_coeff>
      <damping_coeff unit="LBS/FT/SEC">5000</damping_coeff>
      <damping_coeff_rebound unit="LBS/FT/SEC">8000</damping_coeff_rebound>
      <max_steer unit="DEG">45</max_steer>
      <brake_group>NONE</brake_group>
      <retractable>1</retractable>
    </contact>
    <contact name="Left Main Gear" type="BOGEY">
      <location unit="IN">
        <x>174.6</x><y>-67.2</y><z>-84.0</z>
      </location>
      <static_friction>0.80</static_friction>
      <dynamic_friction>0.50</dynamic_friction>
      <rolling_friction>0.02</rolling_friction>
      <spring_coeff unit="LBS/FT">90000</spring_coeff>
      <damping_coeff unit="LBS/FT/SEC">9000</damping_coeff>
      <damping_coeff_rebound unit="LBS/FT/SEC">16000</damping_coeff_rebound>
      <max_steer unit="DEG">0</max_steer>
      <brake_group>LEFT</brake_group>
      <retractable>1</retractable>
    </contact>
    <contact name="Right Main Gear" type="BOGEY">
      <location unit="IN">
        <x>174.6</x><y>67.2</y><z>-84.0</z>
      </location>
      <static_friction>0.80</static_friction>
      <dynamic_friction>0.50</dynamic_friction>
      <rolling_friction>0.02</rolling_friction>
      <spring_coeff unit="LBS/FT">90000</spring_coeff>
      <damping_coeff unit="LBS/FT/SEC">9000</damping_coeff>
      <damping_coeff_rebound unit="LBS/FT/SEC">16000</damping_coeff_rebound>
      <max_steer unit="DEG">0</max_steer>
      <brake_group>RIGHT</brake_group>
      <retractable>1</retractable>
    </contact>
  </ground_reactions>

  <propulsion>
    <engine file="fj33_5a">
      <feed>0</feed>
      <thruster file="direct">
        <location unit="IN">
          <!-- Approximate dorsal nacelle centerline, 2.29 m above the gear
               plane (structural z=-84 in), from sf50_reference.md. The CG
               is at z=-40 in. Installed thrust tilt remains an estimate. -->
          <x>225.0</x><y>0.0</y><z>6.0</z>
        </location>
        <orient unit="DEG">
          <roll>0.0</roll><pitch>0.0</pitch><yaw>0.0</yaw>
        </orient>
      </thruster>
    </engine>
    <tank type="FUEL">
      <description>Aggregate usable fuel tank. AFM 31452-001 p. 1-7: 296 US gal / 2001 lb nominal. Tank geometry and loading remain provisional.</description>
      <location unit="IN">
        <x>158.0</x><y>0.0</y><z>-36.0</z>
      </location>
      <type>JET-A</type>
      <capacity unit="LBS">2001</capacity>
      <contents unit="LBS">1000</contents>
    </tank>
  </propulsion>

  <flight_control name="SF50 V-tail FCS">
    <channel name="Pitch">
      <summer name="Pitch Command">
        <input>fcs/elevator-cmd-norm</input>
        <input>fcs/pitch-trim-cmd-norm</input>
        <clipto><min>-1</min><max>1</max></clipto>
      </summer>
      <aerosurface_scale name="Elevator Control">
        <input>fcs/pitch-command</input>
        <range><min>-0.28</min><max>0.28</max></range>
        <output>fcs/elevator-pos-rad</output>
      </aerosurface_scale>
    </channel>

    <channel name="Yaw">
      <summer name="Yaw Command">
        <input>fcs/rudder-cmd-norm</input>
        <input>fcs/yaw-trim-cmd-norm</input>
        <clipto><min>-1</min><max>1</max></clipto>
      </summer>
      <aerosurface_scale name="Rudder Control">
        <input>fcs/yaw-command</input>
        <range><min>-0.16</min><max>0.16</max></range>
        <output>fcs/rudder-pos-rad</output>
      </aerosurface_scale>
      <summer name="Left Ruddervator Mix">
        <input>fcs/elevator-pos-rad</input>
        <input>fcs/rudder-pos-rad</input>
        <clipto><min>-0.35</min><max>0.35</max></clipto>
      </summer>
      <summer name="Right Ruddervator Mix">
        <input>fcs/elevator-pos-rad</input>
        <input>-fcs/rudder-pos-rad</input>
        <clipto><min>-0.35</min><max>0.35</max></clipto>
      </summer>
      <aerosurface_scale name="Left Ruddervator Control">
        <input>fcs/left-ruddervator-mix</input>
        <domain><min>-0.35</min><max>0.35</max></domain>
        <range><min>-0.35</min><max>0.35</max></range>
        <output>fcs/left-ruddervator-pos-rad</output>
      </aerosurface_scale>
      <aerosurface_scale name="Right Ruddervator Control">
        <input>fcs/right-ruddervator-mix</input>
        <domain><min>-0.35</min><max>0.35</max></domain>
        <range><min>-0.35</min><max>0.35</max></range>
        <output>fcs/right-ruddervator-pos-rad</output>
      </aerosurface_scale>
    </channel>

    <channel name="Roll">
      <summer name="Roll Command">
        <input>fcs/aileron-cmd-norm</input>
        <input>fcs/roll-trim-cmd-norm</input>
        <clipto><min>-1</min><max>1</max></clipto>
      </summer>
      <aerosurface_scale name="Left Aileron Control">
        <input>fcs/roll-command</input>
        <range><min>-0.30</min><max>0.30</max></range>
        <output>fcs/left-aileron-pos-rad</output>
      </aerosurface_scale>
      <aerosurface_scale name="Right Aileron Control">
        <input>-fcs/roll-command</input>
        <range><min>-0.30</min><max>0.30</max></range>
        <output>fcs/right-aileron-pos-rad</output>
      </aerosurface_scale>
    </channel>

    <channel name="Flaps">
      <kinematic name="Flap Control">
        <input>fcs/flap-cmd-norm</input>
        <traverse>
          <setting><position>0</position><time>0</time></setting>
          <setting><position>1</position><time>4</time></setting>
        </traverse>
        <output>fcs/flap-pos-norm</output>
      </kinematic>
      <aerosurface_scale name="Flap Position">
        <input>fcs/flap-pos-norm</input>
        <range><min>0</min><max>35</max></range>
        <output>fcs/flap-pos-deg</output>
      </aerosurface_scale>
    </channel>

    <channel name="Landing Gear">
      <kinematic name="Gear Control">
        <input>gear/gear-cmd-norm</input>
        <traverse>
          <setting><position>0</position><time>0</time></setting>
          <setting><position>1</position><time>8</time></setting>
        </traverse>
        <output>gear/gear-pos-norm</output>
      </kinematic>
    </channel>
  </flight_control>

  <aerodynamics>
    <axis name="DRAG">
      <function name="aero/coefficient/CD0">
        <product>
          <property>aero/qbar-psf</property>
          <property>metrics/Sw-sqft</property>
          <table>
            <independentVar>aero/alpha-rad</independentVar>
            <tableData>
              -0.35 0.095
              -0.10 0.032
               0.00 0.025
               0.20 0.040
               0.40 0.140
               0.70 0.700
            </tableData>
          </table>
        </product>
      </function>
      <function name="aero/coefficient/CDi">
        <product>
          <property>aero/qbar-psf</property>
          <property>metrics/Sw-sqft</property>
          <property>aero/cl-squared</property>
          <value>0.047</value>
        </product>
      </function>
      <function name="aero/coefficient/CDflap">
        <product>
          <property>aero/qbar-psf</property>
          <property>metrics/Sw-sqft</property>
          <property>fcs/flap-pos-norm</property>
          <value>0.060</value>
        </product>
      </function>
      <function name="aero/coefficient/CDgear">
        <product>
          <property>aero/qbar-psf</property>
          <property>metrics/Sw-sqft</property>
          <property>gear/gear-pos-norm</property>
          <value>0.018</value>
        </product>
      </function>
      <function name="aero/coefficient/CDmach">
        <product>
          <property>aero/qbar-psf</property>
          <property>metrics/Sw-sqft</property>
          <table>
            <independentVar>velocities/mach</independentVar>
            <tableData>
              0.00 0.000
              0.55 0.000
              0.65 0.012
              0.75 0.060
            </tableData>
          </table>
        </product>
      </function>
    </axis>

    <axis name="SIDE">
      <function name="aero/coefficient/CYbeta">
        <product>
          <property>aero/qbar-psf</property>
          <property>metrics/Sw-sqft</property>
          <property>aero/beta-rad</property>
          <value>-0.55</value>
        </product>
      </function>
      <function name="aero/coefficient/CYleft-ruddervator">
        <product>
          <property>aero/qbar-psf</property>
          <property>metrics/Sw-sqft</property>
          <property>fcs/left-ruddervator-pos-rad</property>
          <value>0.12</value>
        </product>
      </function>
      <function name="aero/coefficient/CYright-ruddervator">
        <product>
          <property>aero/qbar-psf</property>
          <property>metrics/Sw-sqft</property>
          <property>fcs/right-ruddervator-pos-rad</property>
          <value>-0.12</value>
        </product>
      </function>
    </axis>

    <axis name="LIFT">
      <function name="aero/coefficient/CLalpha">
        <product>
          <property>aero/qbar-psf</property>
          <property>metrics/Sw-sqft</property>
          <table>
            <independentVar>aero/alpha-rad</independentVar>
            <tableData>
              -0.35 -0.78
              -0.10 -0.12
               0.00  0.26
               0.20  1.28
               0.28  1.45
               0.40  1.00
               0.60  0.42
            </tableData>
          </table>
        </product>
      </function>
      <function name="aero/coefficient/CLflap">
        <product>
          <property>aero/qbar-psf</property>
          <property>metrics/Sw-sqft</property>
          <property>fcs/flap-pos-norm</property>
          <value>0.72</value>
        </product>
      </function>
      <function name="aero/coefficient/CLleft-ruddervator">
        <product>
          <property>aero/qbar-psf</property>
          <property>metrics/Sw-sqft</property>
          <property>fcs/left-ruddervator-pos-rad</property>
          <value>0.11</value>
        </product>
      </function>
      <function name="aero/coefficient/CLright-ruddervator">
        <product>
          <property>aero/qbar-psf</property>
          <property>metrics/Sw-sqft</property>
          <property>fcs/right-ruddervator-pos-rad</property>
          <value>0.11</value>
        </product>
      </function>
    </axis>

    <axis name="ROLL">
      <function name="aero/coefficient/Clbeta">
        <product>
          <property>aero/qbar-psf</property>
          <property>metrics/Sw-sqft</property>
          <property>metrics/bw-ft</property>
          <property>aero/beta-rad</property>
          <value>-0.08</value>
        </product>
      </function>
      <function name="aero/coefficient/Clp">
        <product>
          <property>aero/qbar-psf</property>
          <property>metrics/Sw-sqft</property>
          <property>metrics/bw-ft</property>
          <property>aero/bi2vel</property>
          <property>velocities/p-aero-rad_sec</property>
          <value>-0.46</value>
        </product>
      </function>
      <function name="aero/coefficient/Clleft-aileron">
        <product>
          <property>aero/qbar-psf</property>
          <property>metrics/Sw-sqft</property>
          <property>metrics/bw-ft</property>
          <property>fcs/left-aileron-pos-rad</property>
          <value>0.08</value>
        </product>
      </function>
      <function name="aero/coefficient/Clright-aileron">
        <product>
          <property>aero/qbar-psf</property>
          <property>metrics/Sw-sqft</property>
          <property>metrics/bw-ft</property>
          <property>fcs/right-aileron-pos-rad</property>
          <value>-0.08</value>
        </product>
      </function>
    </axis>

    <axis name="PITCH">
      <function name="aero/coefficient/Cmalpha">
        <product>
          <property>aero/qbar-psf</property>
          <property>metrics/Sw-sqft</property>
          <property>metrics/cbarw-ft</property>
          <table>
            <independentVar>aero/alpha-rad</independentVar>
            <tableData>
              -0.35  0.34
              -0.10  0.11
               0.00  0.03
               0.20 -0.18
               0.40 -0.32
               0.60 -0.20
            </tableData>
          </table>
        </product>
      </function>
      <function name="aero/coefficient/Cmq">
        <product>
          <property>aero/qbar-psf</property>
          <property>metrics/Sw-sqft</property>
          <property>metrics/cbarw-ft</property>
          <property>aero/ci2vel</property>
          <property>velocities/q-aero-rad_sec</property>
          <value>-14.0</value>
        </product>
      </function>
      <function name="aero/coefficient/Cmleft-ruddervator">
        <product>
          <property>aero/qbar-psf</property>
          <property>metrics/Sw-sqft</property>
          <property>metrics/cbarw-ft</property>
          <property>fcs/left-ruddervator-pos-rad</property>
          <value>-0.62</value>
        </product>
      </function>
      <function name="aero/coefficient/Cmright-ruddervator">
        <product>
          <property>aero/qbar-psf</property>
          <property>metrics/Sw-sqft</property>
          <property>metrics/cbarw-ft</property>
          <property>fcs/right-ruddervator-pos-rad</property>
          <value>-0.62</value>
        </product>
      </function>
    </axis>

    <axis name="YAW">
      <function name="aero/coefficient/Cnbeta">
        <product>
          <property>aero/qbar-psf</property>
          <property>metrics/Sw-sqft</property>
          <property>metrics/bw-ft</property>
          <property>aero/beta-rad</property>
          <value>0.12</value>
        </product>
      </function>
      <function name="aero/coefficient/Cnr">
        <product>
          <property>aero/qbar-psf</property>
          <property>metrics/Sw-sqft</property>
          <property>metrics/bw-ft</property>
          <property>aero/bi2vel</property>
          <property>velocities/r-aero-rad_sec</property>
          <value>-0.18</value>
        </product>
      </function>
      <function name="aero/coefficient/Cnleft-ruddervator">
        <product>
          <property>aero/qbar-psf</property>
          <property>metrics/Sw-sqft</property>
          <property>metrics/bw-ft</property>
          <property>fcs/left-ruddervator-pos-rad</property>
          <value>0.08</value>
        </product>
      </function>
      <function name="aero/coefficient/Cnright-ruddervator">
        <product>
          <property>aero/qbar-psf</property>
          <property>metrics/Sw-sqft</property>
          <property>metrics/bw-ft</property>
          <property>fcs/right-ruddervator-pos-rad</property>
          <value>-0.08</value>
        </product>
      </function>
    </axis>
  </aerodynamics>
</fdm_config>
